# Прямая AB | Прямая CD
X_ab := [2; 5]
Y_ab := [12; 9]
X_cd := [2; 5]
Y_cd := [3; 6]
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# Нахождение точки пересечения прямых AB и CD
Given
Y_ab[0] == k1*X_ab[0] + b1
Y_ab[1] == k1*X_ab[1] + b1
Find(k1, b1) → [-1; 14]
k1 := -1
b1 := 14
y == k1*x + b1  # уравнение прямой AB
Given
Y_cd[0] == k2*X_cd[1] + b2
Y_cd[1] == k2*X_cd[0] + b2
Find(k2, b2) → [-1; 8]
k2 := 1
b2 := 1
y == k2*x + b2  # уравнение прямой CD
Given
y == k1*x + b1
y == k2*x + b2
Find(x, y) → [13/2; 15/2]
Px := 13/2
Py := 15/2  # точка пересеченя прямых AB и CD
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# Исходные координаты:
P := [X_ab[0], X_ab[1], X_cd[0], X_cd[1]; Y_ab[0], Y_ab[1], Y_cd[0], Y_cd[1]; 1, 1, 1, 1] = [2, 5, 2, 5; 12, 9, 3, 6; 1, 1, 1, 1]
# Матрица перемещения СК:
Ts(dx, dy) := [1, 0, -dx; 0, 1, -dy; 0, 0, 1]
# Матрица поворота СК:
Rs(φ) := [cos(φ), sin(φ), 0; -sin(φ), cos(φ), 0; 0, 0, 1]
φ := -135
φ_rad := φ*π/180 = -2.35619
# 1. Сместим СК в точку P:
A1 := Ts(Px, Py)*P = [-4.5, -1.5, -4.5, -1.5; 4.5, 1.5, -4.5, -1.5; 1, 1, 1, 1]
# 2. Повернем смещенную СК на 135 градусов:
A2 := Rs(φ_rad)*A1 = [0, 0, 6.36396, 2.12132; -6.36396, -2.12132, 0, 0; 1, 1, 1, 1]
# 3. Вернем готовую СК в исходное положение:
A3 := Ts(-Px, -Py)*A2 = [6.5, 6.5, 12.864, 8.62132; 1.13604, 5.37868, 7.5, 7.5; 1, 1, 1, 1]
# Повернутая на 135 прямая AB:
X_ab_New := [A3[0, 0]; A3[0, 1]]
Y_ab_New := [A3[1, 0]; A3[1, 1]]
# Повернутая на 135 прямая CD:
X_cd_New := [A3[0, 2]; A3[0, 3]]
Y_cd_New := [A3[1, 2]; A3[1, 3]]
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