# Задание 1
n := 1 .. 10 = [1; 2; 3; 4; 5; 6; 7; 8; 9; 10]
x := 2
y := (sqrt(x^3 + n) + cos(|n*x - 1|)^2)/(nthroot(x^5 + sin(x) + n, 4)*cos(π/4*(x + n)))
y = [-0.741394; -0.780058; -0.816832; -0.85197; -0.885671; -0.918099; -0.949388; -0.979651; -1.00898; -1.03746]
