f(x) := x^2 + x*sin(2*x) - (x - 5)*cos(x)
x1 := -4 .. 4
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root(f(x1), x1, -4, -2) = -2.97354
root(f(x1), x1, -2, 0) = -1.93283
root(f(x1), x1) = [-2.97354; -2.97354; -1.93283; -2.97354; -1.93283; -1.93283; -2.97354; -1.93283; -1.93283]
