n := 5
A := [n, (n + 1), n + 2; n - 3, n - 2, n; n - 1, n, n + 1]
5*1 + 6*2 + 7*3 = 38
A = [5, 6, 7; 2, 3, 5; 4, 5, 6]
6*5 + 8 = 38
2 + 6 + 15 = 23
B := [6*n + 8; 6*n - 7; 6*n + 2]
B = [38; 23; 32]
30 - 7 = 23
[x; y; z] := A^-1*B = [1; 2; 3]
X := [x; y; z]
4 + 10 + 18 = 32
6*5 + 2 = 32
X = [1; 2; 3]
