n := 5
a := -3*n
b := 3*n
a = -15
b = 15
A := runif(3, a, b)
# B=runif (3,а,b)
B := runif(3, a, b)
C := runif(3, a, b)
# C=runif (3,а,b)
A = [-10.5806; 14.6553; -11.4276]
B = [-14.7323; 0.949925; 3.05292]
C = [-10.0125; -1.47642; -13.2883]
s := A*B
V := B×C
V = [-8.1155; -226.335; 31.2623]
s = 134.911
w := (A×B)*C
w = -3588.39
dA := sqrt(A[0]^2 + A[1]^2 + A[2]^2)
dB := sqrt(B[0]^2 + B[1]^2 + B[2]^2)
dC := sqrt(C[0]^2 + C[1]^2 + C[2]^2)
dA = 21.3849
dB = 15.0753
dC = 16.7036
Array := [dA; dB; dC]
MaxValue := max(Array)
MaxValue = 21.3849
