Δx := π/4
i := 1 .. 10
x1 := -2*π
j := 1 .. 10
x[i] := x1 + i*Δx
g(x) := sqrt(|x|)*sin(x)
x = [0; -5.49779; -4.71239; -3.92699; -3.14159; -2.35619; -1.5708; -0.785398; 0; 0.785398; 1.5708]  # X
g(x) = [0; 2.17456; 3.0753; 2.17456; 0; -2.17456; -3.0753; -2.17456; 0; 2.17456; 3.0753]
Y := g(x)
filename1 := "Matr_X.txt"
Y = [0; 2.17456; 3.0753; 2.17456; 0; -2.17456; -3.0753; -2.17456; 0; 2.17456; 3.0753]
filename2 := "Matr_Y.txt"
WRITEPRN(filename1) := x
WRITEPRN(filename2) := Y
XX := READPRN(filename1)
YY := READPRN(filename2)
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XX = [0; -5.498; -4.712; -3.927; -3.142; -2.356; -1.571; -0.7854; 0; 0.7854; 1.571; 2.356; 3.142; 3.927; 4.712; 5.498; 6.283]
YY = [0; 2.699; 3.817; 2.699; 0; -2.699; -3.817; -2.699; 0; 2.699; 3.817; 2.699; 0; -2.699; -3.817; -2.699; 0]
